*Heading
** Job name: HeadModel Model name: HeadModel
** Generated by: Abaqus/CAE 2024
*Preprint, echo=NO, model=NO, history=NO, contact=NO
**
** PARTS
**
*Part, name=Skull-CSF-Brain
*INCLUDE, INPUT=HeadModel_nodes_elements_Skull-CSF-Brain.inp
*End Part
**
*Part, name=AxonalFibers
*INCLUDE, INPUT=HeadModel_nodes_elements_AxonalFibers.inp
*End Part
**
*Part, name=Mandible
*INCLUDE, INPUT=HeadModel_nodes_elements_Mandible.inp
*End Part
**
**
** ASSEMBLY
**
*Assembly, name=Assembly
*Nset, nset=CENTER_OF_GRAVITY
 2,
*Nset, nset="_T-Datum csys-1", internal
CENTER_OF_GRAVITY,
*Transform, nset="_T-Datum csys-1"
          1.,           0.,           0.,           0.,           1.,           0.
**
*Instance, name=Skull-CSF-Brain-1, part=Skull-CSF-Brain
       0.115,       0.0858,        0.146
       0.115,       0.0858,        0.146, 0.822106811231781, -0.621306811231781, 0.145999999894297, 179.999999987887
*End Instance
**
*Instance, name=AxonalFibers-1, part=AxonalFibers
-0.119643615667599,      -0.1108, 0.071681370936595
-0.119643615667599,      -0.1108, 0.071681370936595, 0.587126413303313, 0.595970028970912, 0.0408231281718987, 183.53497239505
*End Instance
**
*Instance, name=Mandible-1, part=Mandible
       0.115,       0.0858,        0.146
       0.115,       0.0858,        0.146, 0.822106811231781, -0.621306811231781, 0.145999999894297, 179.999999987887
*End Instance
**
** Reference Points
*Node
      2,           0.,           0.,           0.
**      3, -0.593999982,           0.,           0.
**      1, 0.0857999995,  0.115000002,  0.145999998
** *Nset, nset=BLASTSOURCE
**  3,
*Nset, nset=BOTTOMFIXED, instance=Skull-CSF-Brain-1
  878,  880,  882,  884,  886,  888
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*Nset, nset=TOPFIXED, instance=Skull-CSF-Brain-1
 123661, 123665, 123689, 123693, 123697, 123701
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*Elset, elset=_EXPOSEDSURFACE_S1, internal, instance=Skull-CSF-Brain-1
 4593, 4594, 4595, 4596, 4597, 4598
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*Elset, elset=_EXPOSEDSURFACE_S1, internal, instance=Mandible-1
    63,    64,    65,    82,    84,    86
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*Elset, elset=_EXPOSEDSURFACE_S1_1, internal, instance=Skull-CSF-Brain-1
 4593, 4594, 4595, 4596, 4597, 4598
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*Elset, elset=_EXPOSEDSURFACE_S1_1, internal, instance=Mandible-1
    63,    64,    65,    82,    84,    86
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*Elset, elset=_EXPOSEDSURFACE_S2, internal, instance=Mandible-1
    59,    68,    71,    78,    80,    85
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*Elset, elset=_EXPOSEDSURFACE_S2_1, internal, instance=Mandible-1
    59,    68,    71,    78,    80,    85
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*Elset, elset=_M40, internal, instance=AxonalFibers-1
     1,     2,     3,     4,     5,     6
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*Elset, elset=_EXPOSEDSURFACE_S1_2, internal, instance=Skull-CSF-Brain-1
 4593, 4594, 4595, 4596, 4597, 4598
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*Elset, elset=_EXPOSEDSURFACE_S1_2, internal, instance=Mandible-1
    63,    64,    65,    82,    84,    86
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*Elset, elset=_EXPOSEDSURFACE_S3_2, internal, instance=Skull-CSF-Brain-1
    749,    750,    751,    752,    753,    754
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*Elset, elset=_EXPOSEDSURFACE_S3_2, internal, instance=Mandible-1
     7,    13,    18,    19,    37,    62
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*Elset, elset=_EXPOSEDSURFACE_S4_2, internal, instance=Skull-CSF-Brain-1
  693,  694,  695,  696,  697,  698
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*Elset, elset=_EXPOSEDSURFACE_S4_2, internal, instance=Mandible-1
    30,    32,    38,    41,    42,    44
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*Elset, elset=_EXPOSEDSURFACE_S6_2, internal, instance=Skull-CSF-Brain-1, generate
 115135,  117694,       1
*Elset, elset=_EXPOSEDSURFACE_S2_2, internal, instance=Mandible-1
    59,    68,    71,    78,    80,    85
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*Surface, type=ELEMENT, name=EXPOSEDSURFACE
_EXPOSEDSURFACE_S1_2, S1
_EXPOSEDSURFACE_S3_2, S3
_EXPOSEDSURFACE_S4_2, S4
_EXPOSEDSURFACE_S6_2, S6
_EXPOSEDSURFACE_S2_2, S2
*Elset, elset=_PRESSURELOADSURFACE_S3_3, internal, instance=Skull-CSF-Brain-1
 114131, 114132, 114133, 114164, 114165, 114166
*Elset, elset=_PRESSURELOADSURFACE_S6_3, internal, instance=Skull-CSF-Brain-1
 117465, 117466, 117467, 117469, 117470, 117471
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*Surface, type=ELEMENT, name=PRESSURELOADSURFACE
_PRESSURELOADSURFACE_S3_3, S3
_PRESSURELOADSURFACE_S6_3, S6
** Constraint: Constraint-3
*Rigid Body, ref node=CENTER_OF_GRAVITY, elset=SKULL-CSF-BRAIN-1.SKULL
** Constraint: Embed-1
*Embedded Element, host elset=Skull-CSF-Brain-1.Brain
_M40
** Constraint: TIE-1-1-1-1-1
*Tie, name=TIE-1-1-1-1-1, adjust=yes, type=SURFACE TO SURFACE
Mandible-1.SURFACEBOTTOM, Skull-CSF-Brain-1.SURFACETOP
*End Assembly
*Amplitude, name=RAMPED_ACCEL
0.0, 0.0, 0.02, 1.0, 0.04, 0.0

*Amplitude, name=X_AA
       2.04e-06,       0.0671547,     0.000581514,         55.9398,      0.00141196,        -67.0875,      0.00250357,        -303.203
     0.00470924,        -13.7667,      0.00691287,        -391.982,      0.00914099,        0.873011,       0.0113507,        -349.137
      0.0128076,        -218.857,       0.0142848,         5.43953,       0.0161783,         172.923,       0.0180126,          67.759
      0.0210284,         140.152,       0.0223077,         110.738,       0.0238829,         128.064,       0.0255846,         70.0423
      0.0275923,         105.769,       0.0284411,         67.3561,       0.0294491,         104.023,       0.0307284,         74.6088
      0.0321669,         120.274,       0.0337299,           81.19,       0.0351602,         89.2485,       0.0360233,         116.648
      0.0383085,         114.499,       0.0412977,         64.6699,       0.0445787,         42.7775,       0.0494287,          10.006
      0.0525893,         91.6661,       0.0554764,         230.005,       0.0597735,         282.385,       0.0647174,         23.8399
      0.0679943,        -16.8558,       0.0699735,        -112.753,       0.0742624,        -97.9786,       0.0765232,        -212.947
      0.0781412,         1.81318,       0.0802285,         404.204,       0.0817915,          365.12,       0.0860029,         22.6311
      0.0884126,         -64.267,       0.0911263,        -66.8189,       0.0944052,         -98.113,       0.0975495,        -91.6661
       0.100282,        -9.60312,        0.103159,         81.7272,         0.10445,         108.723,        0.106584,         69.1021
       0.107731,          86.831,        0.109884,         131.825,        0.112589,         91.6661,        0.115721,          41.703
       0.118574,         20.2136,        0.120288,         18.6018
*Amplitude, name=X_LA
       1.72e-06,    -0.011102468,      0.00111314,      -191.41272,      0.00168653,     -347.455485,      0.00245495,     -447.830424
     0.00358148,      -316.18611,      0.00426715,     -195.613362,      0.00519351,     -125.206992,      0.00593342,     -101.185245
     0.00777344,     -129.319344,      0.00867747,     -83.0440044,       0.0101693,     -22.0072635,       0.0114215,     -64.9025676
      0.0116983,     -76.0849866,       0.0127098,     -68.8150899,       0.0143263,     -28.2201327,       0.0164111,      53.1473427
      0.0176976,      47.3785722,       0.0195393,        21.10131,       0.0212358,     -7.01007885,       0.0220815,     -23.8502682
      0.0235407,      1.91627559,        0.025697,      5.29585983,       0.0274123,     -2.39590611,       0.0287246,      19.6801353
      0.0302982,      13.8669255,       0.0328747,      6.04194957,       0.0351693,      3.83034393,       0.0377544,      5.28698178
      0.0419233,      12.0683601,       0.0457898,      2.18717874,       0.0500937,    -0.335293047,       0.0525181,     -17.4197151
      0.0561129,     -10.5495759,       0.0584213,      2.08948095,       0.0621545,      3.36847932,       0.0668907,      2.63572137
      0.0699046,      2.16941283,       0.0721889,     -11.1801627,       0.0743194,     -35.6455179,       0.0758638,     -73.0162224
      0.0777364,     -65.8796436,        0.079597,     -71.7372927,       0.0813261,     -64.5784452,       0.0833663,      -31.475385
      0.0842377,     -20.4706251,       0.0856695,     -24.4054161,       0.0868245,       -17.15769,       0.0884015,     -19.2583053
      0.0891123,     -26.7946416,       0.0911353,     -12.2548482,       0.0925671,     -16.1895411,       0.0942979,     -7.17439635
      0.0967343,     -11.2645287,        0.099468,     -4.26111084,        0.101624,    -0.881533467,        0.105211,     -3.29298156
       0.108219,     -9.32827014,         0.11295,     -15.6299787,        0.117109,     -19.9865997,        0.120121,     -22.3092153
*Amplitude, name=Y_AA
    0.000144868,         18.7361,      0.00041012,         582.701,     0.000832483,         1212.34,      0.00125689,         1851.39
     0.00153234,         2462.36,      0.00198735,         2584.18,       0.0026668,         1765.43,      0.00359722,         128.333
     0.00404407,        -1103.96,      0.00481942,        -1480.83,      0.00627219,        -1369.35,      0.00822893,        -1568.67
     0.00943685,        -1927.14,        0.010759,        -1100.87,       0.0117221,        -612.786,       0.0124444,        -575.851
      0.0132667,        -736.485,       0.0139849,        -718.353,        0.016109,        -804.983,       0.0185105,        -271.238
      0.0192328,        -234.303,       0.0208713,        -583.775,       0.0222179,        -302.935,       0.0235013,        -313.545
      0.0262763,        -34.0474,       0.0271434,          12.155,        0.028484,        -393.459,       0.0291879,        -441.139
      0.0310957,        -207.844,       0.0344215,        -22.8997,       0.0372373,        -213.619,       0.0401081,        -150.494
      0.0423852,        -190.249,       0.0445542,        -70.0423,       0.0482799,        -17.1244,       0.0513385,         252.703
      0.0533524,         316.634,       0.0551928,         239.675,       0.0577209,         39.8227,       0.0587145,         10.6776
       0.060302,         84.4134,       0.0614609,         158.552,       0.0634503,         109.664,       0.0657213,          41.703
      0.0695817,           56.88,       0.0714732,         214.962,       0.0732646,         570.613,       0.0749133,         1584.65
      0.0760926,          1752.8,        0.076666,         1761.67,       0.0775495,         1883.08,       0.0791512,         2022.63
      0.0808549,         1974.01,       0.0816527,         1700.56,        0.083385,         1125.31,        0.084493,         964.408
      0.0858866,         803.237,       0.0874128,         594.923,       0.0889798,         574.642,       0.0909304,         347.122
      0.0920649,         308.441,       0.0970169,         87.5025,         0.10069,        -104.023,        0.103379,        -219.394
       0.106107,        -156.135,        0.110571,         8.93157,        0.112726,         63.3268,        0.116038,         182.459
       0.119892,         169.431
*Amplitude, name=Y_LA
    0.000141803,    -0.033307304,      0.00105271,      53.6669784,      0.00206593,      62.7931233,      0.00418955,       30.902481
     0.00616107,      -10.247526,      0.00776039,      11.7841644,      0.00876846,      15.3413685,       0.0110459,     -5.43353337
      0.0129305,      14.6974401,       0.0140839,      20.0887218,       0.0165065,      1.14799563,       0.0183706,     -0.99700011
      0.0213982,      13.3873146,         0.02283,      9.45261189,       0.0241182,      5.54011902,       0.0272723,      1.33895709
       0.032439,     0.539578449,       0.0377509,      1.57432842,       0.0469362,     0.153213561,       0.0536885,      6.53489226
      0.0561353,      13.5827298,       0.0590039,      11.2822848,       0.0608714,      12.8499228,       0.0650335,      12.2059944
       0.068765,      11.6286759,       0.0722078,       9.2394504,       0.0753567,    -0.530696475,       0.0776427,     -12.0239208
      0.0793752,     -1.15242975,       0.0808207,      9.76348098,       0.0825378,      3.92804172,       0.0854013,      -3.9413637
      0.0876977,     -4.29664266,       0.0901375,     -4.67412165,       0.0920084,     0.606193254,       0.0950258,      3.85254396
      0.0997619,      3.11978601,        0.104209,     0.575106345,        0.107519,      9.34602624,        0.110536,      12.5924103
       0.115272,      11.8596033,        0.120432,      3.63493854
*Amplitude, name=Z_AA
       2.04e-06,       0.0671547,      0.00140788,         572.359,       0.0023281,         863.005,      0.00400122,         15.1098
     0.00476841,        -399.369,      0.00559886,        -522.396,      0.00676801,        -401.249,      0.00752295,        -213.888
     0.00810039,         -186.22,      0.00963885,        -338.124,       0.0109855,        -57.2829,       0.0124444,         82.3988
      0.0134524,         119.065,       0.0152826,        -4.90229,       0.0168292,          -119.2,       0.0184248,        -7.85709
       0.021312,         130.482,       0.0230218,         110.066,       0.0235707,         6.11107,       0.0259988,         3.82782
      0.0289982,         1.00732,       0.0315711,          7.9914,       0.0368598,         21.8253,       0.0435748,         24.9144
      0.0498592,         19.0048,       0.0536074,         175.341,       0.0566313,          285.34,       0.0597776,         301.189
      0.0623526,         317.574,       0.0670251,         125.109,       0.0698572,         9.60312,       0.0745603,        -41.8374
      0.0791002,         -187.16,       0.0822689,        -67.8934,       0.0854377,         51.3733,       0.0877352,         105.634
       0.091867,          54.731,        0.094291,         33.6445,       0.0970006,         12.2893,        0.102283,        -2.08179
       0.107717,         21.0194,         0.11343,          15.647,        0.119427,        0.604392
*Amplitude, name=Z_LA
    0.000145237,     0.011102468,      0.00146301,     -278.726625,      0.00192035,     -405.046071,      0.00285015,     -330.925635
     0.00310182,     -213.999264,      0.00395848,     -63.7479306,      0.00470595,      123.652107,      0.00562887,      190.346373
     0.00686219,      127.031652,      0.00765807,      56.3581557,      0.00841516,       98.942679,      0.00973602,      130.300344
      0.0109625,      59.5601397,       0.0127458,       -29.83221,       0.0135881,     -50.3850429,       0.0152028,      -11.646432
      0.0169663,      32.6389491,       0.0199785,      30.3163335,       0.0225464,      13.2096555,       0.0239919,      24.1256349
      0.0259892,        10.82043,       0.0278446,    -0.606193254,       0.0311473,     0.739421883,       0.0332829,     -18.1569366
      0.0372946,     -26.2039815,       0.0414636,     -19.4226228,        0.044493,     -3.18196179,       0.0475309,       22.340313
      0.0514231,      40.3040907,       0.0548934,      67.6160136,       0.0579296,      91.2819519,       0.0609349,      81.5340492
       0.065244,      84.5805447,       0.0696708,      59.7599694,       0.0743778,      27.4696677,       0.0757975,      10.5406488
      0.0772344,      12.1748967,       0.0792334,     0.726098922,       0.0815486,      20.7904311,        0.085024,      53.6713929
      0.0883061,      32.7410712,       0.0914498,       17.401959,       0.0964696,      12.9121182,         0.10192,      8.35569693
       0.106511,      5.78881233,        0.110666,     -2.28044241,        0.114389,     -12.1393845,        0.118831,     -20.2530393
**
** MATERIALS
**
**      ---------------------------------------------------
**      ---- SOLID elements -------------------------------
**      ---------------------------------------------------
**
**      following elements refer to a (missing) PSOLID entry with PID = 1
**      DUMMY MATERIAL AND SECTION -=>
*Material, name=BrainTissue
*Density
1040.,
*Hyperelastic, mooney-rivlin, moduli=LONG TERM
-1034.,   7809., 9.1e-10
*Viscoelastic, time=RELAXATION TEST DATA, errtol=0.0001, nmax=6
*Shear Test Data, shrinf=0.3308
  0.735,  0.00346
 0.6617, 0.004844
 0.5882,   0.0066
 0.5147,    0.009
 0.3676,   0.0221
**      following elements refer to a (missing) PSOLID entry with PID = 2
**      DUMMY MATERIAL AND SECTION -=>
*Material, name=CSF
*Density
1004.,
*Eos, type=USUP
1489., 1.79, 1.65
*Viscosity
 0.001,
**      following elements refer to a (missing) PSOLID entry with PID = 4
**      DUMMY MATERIAL AND SECTION -=>
*Material, name=Skull
*Density
2100.,
*Elastic
 1.5e+10, 0.229
*Material, name=AxonalFiberTracks
*Density
1040.,
*Hyperelastic, ogden, test data input
*Uniaxial Test Data, smooth=10
      0.,  -0.5
      0.,  -0.4
      0.,  -0.3
      0.,  -0.2
      0.,  -0.1
      0.,    0.
  1666.7, 0.029
   3750., 0.052
  5833.3, 0.078
  8333.3, 0.097
  10000., 0.122
 14583.3, 0.151
 18333.3, 0.183
 23333.3, 0.213
  28750., 0.244
  39583., 0.291
  52083., 0.338
  69583., 0.389
  95000., 0.445
 115417., 0.482
 133750., 0.511
 150833., 0.536
** ----------------------------------------------------------------
**
** STEP: Step-1
**
*Step, name=Step-1, nlgeom=YES
*Dynamic, Explicit
, 0.048
*Bulk Viscosity
0.06, 1.2
*INCLUDE, INPUT=HeadModel_BoundaryConditions.inp
**
** OUTPUT REQUESTS
**
*Restart, write, number interval=1, time marks=NO
**
** FIELD OUTPUT: F-Output-1
**
*Output, field, number interval=75
*Node Output
A, RF, U, V
*Element Output, directions=YES
E, LE, NE,ER, ERV, EVF, S
**
** HISTORY OUTPUT: H-Output-1
**
*Output, history, variable=PRESELECT, frequency=1
*End Step
